ORIGIN := 1
# [area: МКЭ]
# Формирование вектора координат узлов элементов для КЭ
# для элемента ne формируется вектор из двух векторов в которых записаны координаты узлов x и y с первого по последний узел.
Form_xy_for_KE(UE, XY, MC, ne) :=
    f(x, y) ← 0
    k ←
        4 if MC[ne, 2] == 4
        3 if MC[ne, 2] == 3
        4 if MC[ne, 2] == 5
    [x; y] ← [matrix(k, 1, f); matrix(k, 1, f)]
    for i ∈ 1 .. k
        x[i] ← XY[UE[ne, i], 1]
        y[i] ← XY[UE[ne, i], 2]
    [x; y]
# 4х узловой КЭ
# Матрица градиентов для 4х узлового линейного прямоугольно КЭ
B4(x, y, a, b) := [
    y/(a*b) - 1/a, 0, 1/a - y/(a*b), 0, y/(a*b), 0, -y/(a*b), 0;
    0, x/(a*b) - 1/b, 0, -x/(a*b), 0, x/(a*b), 0, 1/b - x/(a*b);
    x/(a*b) - 1/b, y/(a*b) - 1/a, -x/(a*b), 1/a - y/(a*b), x/(a*b), y/(a*b), 1/b - x/(a*b), -y/(a*b)
]
# Матрица градиентов для 4х узлового линейного  КЭ
B4general(X, Y, ε, η) :=
    N(ε, η) ← [1*(1 - ε)*(1 - η); 1*(1 + ε)*(1 - η); 1*(1 + ε)*(1 + η); 1*(1 - ε)*(1 + η)]*1/4
    x(ε, η) ← X[1]*N(ε, η)[1] + X[2]*N(ε, η)[2] + X[3]*N(ε, η)[3] + X[4]*N(ε, η)[4]
    y(ε, η) ← Y[1]*N(ε, η)[1] + Y[2]*N(ε, η)[2] + Y[3]*N(ε, η)[3] + Y[4]*N(ε, η)[4]
    J(ε, η) ← [d/dε(x(ε, η)), d/dε(y(ε, η)); d/dη(x(ε, η)), d/dη(y(ε, η))]
    dN(ε, η) ←
        for i ∈ 1 .. rows(X)
            DN[i] ← J(ε, η)^-1*[d/dε(N(ε, η)[i]); d/dη(N(ε, η)[i])]
        DN
    B4general(ε, η) ← [
        dN(ε, η)[1][1], 0, dN(ε, η)[2][1], 0, dN(ε, η)[3][1], 0, dN(ε, η)[4][1], 0;
        0, dN(ε, η)[1][2], 0, dN(ε, η)[2][2], 0, dN(ε, η)[3][2], 0, dN(ε, η)[4][2];
        dN(ε, η)[1][2], dN(ε, η)[1][1], dN(ε, η)[2][2], dN(ε, η)[2][1], dN(ε, η)[3][2], dN(ε, η)[3][1], dN(ε, η)[4][2], dN(ε, η)[4][1]
    ]
    return B4general(ε, η)
# Формирование весов элементов, приходящихся на его узлы. (объём функции формы)
Mass_ELnodes(UE, XY, MC, ne) :=
    [X; Y] ← Form_xy_for_KE(UE, XY, MC, ne)
    η ← 0
    ε ← 0
    N(ε, η) ← [1*(1 - ε)*(1 - η); 1*(1 + ε)*(1 - η); 1*(1 + ε)*(1 + η); 1*(1 - ε)*(1 + η)]*1/4
    x(ε, η) ← X[1]*N(ε, η)[1] + X[2]*N(ε, η)[2] + X[3]*N(ε, η)[3] + X[4]*N(ε, η)[4]
    y(ε, η) ← Y[1]*N(ε, η)[1] + Y[2]*N(ε, η)[2] + Y[3]*N(ε, η)[3] + Y[4]*N(ε, η)[4]
    J(ε, η) ← [d/dε(x(ε, η)), d/dε(y(ε, η)); d/dη(x(ε, η)), d/dη(y(ε, η))]
    Xlow ← -1
    Xup ← 1
    Ylow ← -1
    Yup ← 1
    [
        integral(integral(N(ε, η)[1]*|J(ε, η)|, ε = Xlow .. Xup), η = Ylow .. Yup);
        integral(integral(N(ε, η)[2]*|J(ε, η)|, ε = Xlow .. Xup), η = Ylow .. Yup);
        integral(integral(N(ε, η)[3]*|J(ε, η)|, ε = Xlow .. Xup), η = Ylow .. Yup);
        integral(integral(N(ε, η)[4]*|J(ε, η)|, ε = Xlow .. Xup), η = Ylow .. Yup)
    ]
# СОБСТВЕННЫЙ ВЕС
# Матрица упругости для 4х узлового КЭ для плоского напряжённого состояния (из плоскости происходят деформации, а напряжений не возникает)
D4(E, μ) := E/(1 - μ^2)*[1, μ, 0; μ, 1, 0; 0, 0, (1 - μ)/2]
# Для плоской деформации (это когда плоское тело вырезанно из продолговатого, и из своей плоскости деформаций не происходит, появляются только напряжения)
D4(E, μ) :=
    E1 ← E/(1 - μ^2)
    μ1 ← μ/(1 - μ)
    return D4(E1, μ1)  # disabled
# Формирование МЖ в ЛСК для 4х узлового линейного прямоугольного КЭ
Form_ke4(E, μ, t, a, b) :=
    d11 ← E/(1 - μ^2)
    d12 ← μ*E/(1 - μ^2)
    d22 ← d11
    d33 ← E/(2*(1 + μ))
    ke ← [
        t*(b*d11/(3*a) + a*d33/(3*b)), t*(d12/4 + d33/4), -t*(b*d11/(3*a) - a*d33/(6*b)), t*(d12/4 - d33/4), -t*(b*d11/(6*a) + a*d33/(6*b)), -t*(d12/4 + d33/4), t*(b*d11/(6*a) - a*d33/(3*b)), -t*(d12/4 - d33/4);
        t*(d12/4 + d33/4), t*(a*d22/(3*b) + b*d33/(3*a)), -t*(d12/4 - d33/4), -t*(b*d33/(3*a) - a*d22/(6*b)), -t*(d12/4 + d33/4), -t*(a*d22/(6*b) + b*d33/(6*a)), t*(d12/4 - d33/4), -t*(a*d22/(3*b) - b*d33/(6*a));
        -t*(b*d11/(3*a) - a*d33/(6*b)), -t*(d12/4 - d33/4), t*(b*d11/(3*a) + a*d33/(3*b)), -t*(d12/4 + d33/4), t*(b*d11/(6*a) - a*d33/(3*b)), t*(d12/4 - d33/4), -t*(b*d11/(6*a) + a*d33/(6*b)), t*(d12/4 + d33/4);
        t*(d12/4 - d33/4), -t*(b*d33/(3*a) - a*d22/(6*b)), -t*(d12/4 + d33/4), t*(a*d22/(3*b) + b*d33/(3*a)), -t*(d12/4 - d33/4), -t*(a*d22/(3*b) - b*d33/(6*a)), t*(d12/4 + d33/4), -t*(a*d22/(6*b) + b*d33/(6*a));
        -t*(b*d11/(6*a) + a*d33/(6*b)), -t*(d12/4 + d33/4), t*(b*d11/(6*a) - a*d33/(3*b)), -t*(d12/4 - d33/4), t*(b*d11/(3*a) + a*d33/(3*b)), t*(d12/4 + d33/4), -t*(b*d11/(3*a) - a*d33/(6*b)), t*(d12/4 - d33/4);
        -t*(d12/4 + d33/4), -t*(a*d22/(6*b) + b*d33/(6*a)), t*(d12/4 - d33/4), -t*(a*d22/(3*b) - b*d33/(6*a)), t*(d12/4 + d33/4), t*(a*d22/(3*b) + b*d33/(3*a)), -t*(d12/4 - d33/4), -t*(b*d33/(3*a) - a*d22/(6*b));
        t*(b*d11/(6*a) - a*d33/(3*b)), t*(d12/4 - d33/4), -t*(b*d11/(6*a) + a*d33/(6*b)), t*(d12/4 + d33/4), -t*(b*d11/(3*a) - a*d33/(6*b)), -t*(d12/4 - d33/4), t*(b*d11/(3*a) + a*d33/(3*b)), -t*(d12/4 + d33/4);
        -t*(d12/4 - d33/4), -t*(a*d22/(3*b) - b*d33/(6*a)), t*(d12/4 + d33/4), -t*(a*d22/(6*b) + b*d33/(6*a)), t*(d12/4 - d33/4), -t*(b*d33/(3*a) - a*d22/(6*b)), -t*(d12/4 + d33/4), t*(a*d22/(3*b) + b*d33/(3*a))
    ]
# Формирование МЖ в ЛСК для 4х узлового линейного КЭ
Form_ke4general(E, μ, t, UE, XY, MC, ne) :=
    D ← D4(E, μ)
    [X; Y] ← Form_xy_for_KE(UE, XY, MC, ne)
    N(ε, η) ← [1*(1 - ε)*(1 - η); 1*(1 + ε)*(1 - η); 1*(1 + ε)*(1 + η); 1*(1 - ε)*(1 + η)]*1/4
    x(ε, η) ← X[1]*N(ε, η)[1] + X[2]*N(ε, η)[2] + X[3]*N(ε, η)[3] + X[4]*N(ε, η)[4]
    y(ε, η) ← Y[1]*N(ε, η)[1] + Y[2]*N(ε, η)[2] + Y[3]*N(ε, η)[3] + Y[4]*N(ε, η)[4]
    J(ε, η) ← [d/dε(x(ε, η)), d/dε(y(ε, η)); d/dη(x(ε, η)), d/dη(y(ε, η))]
    dN(ε, η) ←
        for i ∈ 1 .. rows(X)
            DN[i] ← J(ε, η)^-1*[d/dε(N(ε, η)[i]); d/dη(N(ε, η)[i])]
        DN
    B4(ε, η) ← [
        dN(ε, η)[1][1], 0, dN(ε, η)[2][1], 0, dN(ε, η)[3][1], 0, dN(ε, η)[4][1], 0;
        0, dN(ε, η)[1][2], 0, dN(ε, η)[2][2], 0, dN(ε, η)[3][2], 0, dN(ε, η)[4][2];
        dN(ε, η)[1][2], dN(ε, η)[1][1], dN(ε, η)[2][2], dN(ε, η)[2][1], dN(ε, η)[3][2], dN(ε, η)[3][1], dN(ε, η)[4][2], dN(ε, η)[4][1]
    ]
    ke4 ← t*sum({
        Loc ← 0.57735
        [ε; η] ←
            [-Loc; -Loc] if i == 1
            [-Loc; Loc] if i == 2
            [Loc; -Loc] if i == 3
            [Loc; Loc] if i == 4
        transpose(B4(ε, η))*D*B4(ε, η)*|J(ε, η)|
    }, i = 1 .. 4)
# Рамный КЭ
# Формирование массива. Длина элемента, косинус и синус угла между положительным направлением элемента и горизонтальной осью
cs(XY, UE, ne) :=
    Δx ← XY[UE[ne, 1], 1] - XY[UE[ne, 2], 1]
    Δy ← XY[UE[ne, 1], 2] - XY[UE[ne, 2], 2]
    L ← sqrt(Δx^2 + Δy^2)
    c ← -Δx/L
    s ← -Δy/L
    [L; c; s]
# Формирование матрицы направляющих косинусов
Form_λe(cosα, sinα) := [
    cosα, sinα, 0, 0, 0, 0;
    -sinα, cosα, 0, 0, 0, 0;
    0, 0, 1, 0, 0, 0;
    0, 0, 0, cosα, sinα, 0;
    0, 0, 0, -sinα, cosα, 0;
    0, 0, 0, 0, 0, 1
]
# Формирование МЖ КЭ в ЛСК
Form_ke(EI, EA, L) := [
    EA/L, 0, 0, -EA/L, 0, 0;
    0, 12*EI/L^3, 6*EI/L^2, 0, -12*EI/L^3, 6*EI/L^2;
    0, 6*EI/L^2, 4*EI/L, 0, -6*EI/L^2, 2*EI/L;
    -EA/L, 0, 0, EA/L, 0, 0;
    0, -12*EI/L^3, -6*EI/L^2, 0, 12*EI/L^3, -6*EI/L^2;
    0, 6*EI/L^2, 2*EI/L, 0, -6*EI/L^2, 4*EI/L
]
# Формирование МЖ КЭ в ГСК
Form_Ke(EI, EA, L, cosα, sinα) :=
    ke ← Form_ke(EI, EA, L)
    λe ← Form_λe(cosα, sinα)
    return transpose(λe)*ke*λe
# Ансамблирование МЖ, формирование ГМЖ в ГСК
Form_R_rama(R, Ke, MI, ne) :=
    for i ∈ 1 .. rows(Ke)
        for j ∈ 1 .. cols(Ke)
            R[MI[ne, i], MI[ne, j]] ← R[MI[ne, i], MI[ne, j]] + Ke[i, j]
    R
# КЭ для нуль-эл-та
Form_ke_0(cke) := [cke, 0, -cke; 0, -cke, cke; -cke, cke, 0]  # МЖ нуль-элемента в ЛСК
# Нуль -  элемент в ЛСК
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Form_qe_0(cke) := [-cke; 0; cke]  # ГВ в ЛСК для нуль элемента
# Формирование матрицы направляющих косинусов для ферменных КЭ
Form_Λe_0(cosα, sinα) := [cosα, sinα, 0, 0, 0; 0, 0, cosα, sinα, 0; 0, 0, 0, 0, 1]
# Нуль - элемент в ГСК
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# Формирование ГВ в ГСК
Form_Qe(qe, cosα, sinα) :=
    λe ← Form_Λe_0(cosα, sinα)
    return transpose(λe)*qe
# Ансамблирование грузового вертока в ГСК, формирование ГГВ в ГСК
LoadQ_to_RF(Qe, MI, RF, ne) :=
    for i ∈ 1 .. cols(MI)
        RF[MI[ne, i]] ← RF[MI[ne, i]] + Qe[i]
    RF
Form_Ke_0(cosα, sinα, ke) :=
    Λe ← Form_Λe_0(cosα, sinα)
    transpose(Λe)*ke*Λe  # Формирование матрицы жёсткости КЭ фермы в ГСК
# Общие операции
# Формирование МЖ (ансамблирование)
Form_R(R, MI, ne, Ke) :=
    for i ∈ 1 .. rows(Ke)
        for j ∈ 1 .. cols(Ke)
            R[MI[ne, i], MI[ne, j]] ← R[MI[ne, i], MI[ne, j]] + Ke[i, j]
    R
# Формирование загружения от собственного веса
Form_RF_γ(UE, XY, MC, RF, t, γ) :=
    ρ ← (t*γ)
    f(x, y) ← 0
    RFγ ← matrix(rows(RF), 1, f)
    for ne ∈ 1 .. rows(UE)
        Mass ← Mass_ELnodes(UE, XY, MC, ne)
        for i ∈ 1 .. 4
            Index ← UE[ne, i]*2
            RFγ[Index] ← RFγ[Index] + (-(Mass[i]*ρ))
    RFγ
# Загружение системы
LoadF_to_RF(RF, LoadF) :=
    RF ← -RF
    for k ∈ 1 .. rows(LoadF)
        RF[LoadF[k, 1]] ← RF[LoadF[k, 1]] + LoadF[k, 2]
    RF
# Добавление собственного веса к загружению системы | СОБСТВЕННЫЙ ВЕС
LoadFγ_to_RF(RF, UE, XY, MC, t, γ) :=
    Fγ ← Form_RF_γ(UE, XY, MC, RF, t, γ)
    for i ∈ 1 .. rows(RF)
        RF[i] ← RF[i] + Fγ[i]
    RF
# Опирание системы
# Опирание ГМЖ(обнуление и единицы) | Опирания ГГВ (обнуление и единицы)
Supports(R, RF, Support) :=
    for i ∈ 1 .. rows(Support)
        nss ← Support[i, 1]
        z ← Support[i, 2]
        for j ∈ 1 .. rows(R)
            R[nss, j] ← 0
            R[j, nss] ← 0
            R[nss, nss] ← 1
            RF[nss] ← 0
    [R; RF]
Supports_forR(R, Support) :=
    for i ∈ 1 .. rows(Support)
        nss ← Support[i, 1]
        z ← Support[i, 2]
        for j ∈ 1 .. rows(R)
            R[nss, j] ← 0
            R[j, nss] ← 0
            R[nss, nss] ← 1
    R
Supports_forRF(RF, Support) :=
    for i ∈ 1 .. rows(Support)
        nss ← Support[i, 1]
        z ← Support[i, 2]
        for j ∈ 1 .. rows(RF)
            RF[nss] ← 0
    RF
# Определение линейных размеров прямоугольного КЭ
a_b_e(XY, UE, ne) :=
    n1 ← UE[ne, 1]
    n2 ← UE[ne, 2]
    n4 ← UE[ne, 4]
    a ← |XY[n2, 1] - XY[n1, 1]|
    b ← |XY[n4, 2] - XY[n1, 2]|
    [a; b]
# U
# Расчёт узловых перемещений
PZTU_U(XY, UE, MI, MehChar, MC, Support, LoadFQ, UErama, MIrama, MCr, MehCharRama, Support_rama, γ, t) :=
    f(x, y) ← 0
    R ← matrix(max(MIrama), max(MIrama), f)
    RF ← matrix(max(MIrama), 1, f)
    for ne ∈ 1 .. rows(UE)
        nMC ← MC[ne, 1]
        ET ← MC[ne, 2]
        E ← MehChar[nMC, 1]
        μ ← MehChar[nMC, 2]
        t ← MehChar[nMC, 3]
        ke ← Form_ke4general(E, μ, t, UE, XY, MC, ne)
        R ← Form_R(R, MI, ne, ke)
    for ne ∈ 1 .. rows(UErama)
        nMC ← MCr[ne, 1]
        [L; cosα; sinα] ← cs(XY, UErama, ne)
        EI ← MehCharRama[nMC, 1]*MehCharRama[nMC, 3]
        EA ← MehCharRama[nMC, 1]*MehCharRama[nMC, 2]
        Ke ← Form_Ke(EI, EA, L, cosα, sinα)
        R ← Form_R_rama(R, Ke, MIrama, ne)
    RF ← LoadF_to_RF(RF, LoadFQ)
    RF ← LoadFγ_to_RF(RF, UE, XY, MC, t, γ) if γ ≠ 0
    Support ← stack(Support, Support_rama)
    [R; RF] ← Supports(R, RF, Support)
    U ← lsolve(R, RF)
    return U
# Формирование вектора узловых перемещений элемета
Form_ue(UE, U, MI, ne) :=
    for i ∈ 1 .. cols(MI)
        ue[i] ← U[MI[ne, i]]
    return ue
# Формирования вектора деформаций на элементе
Form_εe(XY, UE, U, MI, MC, ne) :=
    ue ← Form_ue(UE, U, MI, ne)
    if MC[ne, 2] == 4 or MC[ne, 2] == 5
        εe4 ←
            [x; y] ← Form_xy_for_KE(UE, XY, MC, ne)
            [xc; yc] ← [sum(x); sum(y)]*1/4
            if MC[ne, 2] == 4
                [a; b] ← a_b_e(XY, UE, ne)
                return εe ← B4(xc, yc, a, b)*ue
            if MC[ne, 2] == 5
                "0, 0 потому что местные оси элемента из центра идут"
                return εe ← B4general(x, y, 0, 0)*ue
# Формирования вектора напряжений на элементе
Form_σe(XY, UE, U, MI, MC, E, μ, ne) :=
    εe ← Form_εe(XY, UE, U, MI, MC, ne)
    σe ← D4(E, μ)*εe if MC[ne, 2] == 4 or MC[ne, 2] == 5
# σ
# Результанты решения системы, напряжения и деформации в элементе
Result(XY, UE, U, MI, MC, E, μ) :=
    for ne ∈ 1 .. rows(UE)
        ue ← Form_ue(UE, U, MI, ne)
        εe ← Form_εe(XY, UE, U, MI, MC, ne)
        σe ← Form_σe(XY, UE, U, MI, MC, E, μ, ne)
        εσ[ne, 1] ← εe[1]
        εσ[ne, 2] ← εe[2]
        εσ[ne, 3] ← εe[3]
        εσ[ne, 4] ← σe[1]
        εσ[ne, 5] ← σe[2]
        εσ[ne, 6] ← σe[3]
    εσ ← stack(["εx", "εy", "γ", "σx", "σy", "τ"], εσ)
    return εσ
# Для РАМЫ
# Площадь  Ar := 0.2  m^2
# Модуль упругости Er := 2*10^11Pa
# Момент инерции Ix := 2.3*10^-4 m^4
# Массив механических характеристик
MehCharRama := [Er, Ar, Ix]
# Для ПЗТУ
# F := 10^6  Усилие, приложенное к системе, N
# q := 0  Интенсивность распределённой нагрузки, N/m
# γ := 5  Собственный вес грунта, N/m^3
# E := 5*10^7  Модуль упругости грунта, Pa
# t := 1  Толщина пластинки, m
# μ := 0.3  Коэф Пуассона
# MehChar := [E, μ, t]  Жёсткостные (механические) характеристики системы
UE := [1, 2, 3, 4; 9, 10, 11, 12]
MI := [1, 2, 3, 4, 5, 6, 7, 8; 17, 18, 19, 20, 21, 22, 23, 24]
MC := [1, 5; 1, 5]
XY := augment(XY1, XY2)
Support := [1, 0; 2, 0; 3, 0; 4, 0; 21, 0; 22, 0; 23, 0; 24, 0]
XY = [
    0, 0;
    1.75, 0;
    1.75, 1.75;
    0, 1.75;
    0, 1.75;
    1.75, 1.75;
    2.5, 2.75;
    4, 2.75;
    2.5, 2.75;
    4, 2.75;
    4, 4;
    2.5, 4
]
UErama := [5, 6; 6, 7; 7, 8]
MIrama := [9, 10, 25, 11, 12, 26; 11, 12, 26, 13, 14, 27; 13, 14, 27, 15, 16, 28]
MCr := [1, 2; 1, 2; 1, 2]
LoadFQ := [15, F; 1, 0; 1, 0]
Support_rama := [9, 0; 10, 0; 25, 0]
U := PZTU_U(XY, UE, MI, MehChar, MC, Support, LoadFQ, UErama, MIrama, MCr, MehCharRama, Support_rama, γ, t)
U = [0; 0; 0; 0; 3.07376e-8; -1.48565e-7; -3.07376e-8; -1.48565e-7; 0; 0; 4.375e-5; -0.033288; 0.0471564; -0.0685991; 0.0471939; -0.146045; 1.81345e-8; -7.56274e-8; -1.81345e-8; -7.56274e-8; 0; 0; 0; 0; 0; -0.0380435; -0.0516304; -0.0516304]
# Внизу области формирования расчётной схемы и дэф. схемы
# [area: Формирование расчётной и деформированной схемы.]
# Формирование расчётной схемы
rc(XY, UE, KE, n) :=
    for NS ∈ 1 .. KE - 1
        for ne ∈ 1 .. rows(UE)
            un ← UE[ne, NS]
            uk ← UE[ne, NS + 1]
            xn ← XY[un, 1]
            yn ← XY[un, 2]
            xk ← XY[uk, 1]
            yk ← XY[uk, 2]
            for i ∈ 0 .. n
                xy[(n + 1)*ne + i, 1] ← (xk - xn)/n*i + xn
                xy[(n + 1)*ne + i, 2] ← (yk - yn)/(xk - xn)*xy[(n + 1)*ne + i, 1] + (xk*yn - xn*yk)/(xk - xn) if xn ≠ xk
                xy[(n + 1)*ne + i, 2] ← (yk - yn)/n*i + yn if xn == xk
        X_Y[NS] ← xy
    return X_Y
# Функции формы для 4х узлового КЭ
N1(x, y) := x*y/(L*h) - y/h - x/L + 1
N3(x, y) := x/L - x*y/(L*h)
N5(x, y) := x*y/(L*h)
N7(x, y) := y/h - x*y/(L*h)
# Функции формы для рамного КЭ
N0r(x, L) := 1 - 3*x^2/L^2 + 2*x^3/L^3
N1r(x, L) := x - 2/L*x^2 + 1/L^2*x^3
N2r(x, L) := 3*x^2/L^2 - 2*x^3/L^3
N3r(x, L) := -x^2/L + x^3/L^2
# Функции формы для ферменного КЭ
N1(z, L) := 1 - z/L
N2(z, L) := z/L
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# Изображение деформированной схемы
# Bход: массивы
# XY - координаты узлов
# ue - узлы элементов
# z - массив перемещений узлов
# n - число точек на элементе
# k - масштабный множитель
DefC(XY, ue, z, KE, n, k) :=
    z ← z(XY)*k
    for NS ∈ 1 .. KE - 1
        for ne ∈ 1 .. rows(ue)
            un ← ue[ne, NS]
            uk ← ue[ne, NS + 1]
            xn ← XY[un, 1]
            yn ← XY[un, 2]
            xk ← XY[uk, 1]
            yk ← XY[uk, 2]
            L ← sqrt((xk - xn)^2 + (yk - yn)^2)
            Ldef ← sqrt(((xk + z[uk, 1]) - (xn + z[un, 1]))^2 + ((yk + z[uk, 2]) - (yn + z[un, 2]))^2)
            cosα ← (xk - xn)/L
            sinα ← (yk - yn)/L
            "Global Origin Node Displacements "
            Xn ← z[un, 1]
            Yn ← z[un, 2]
            "Local Origin Node Displacements "
            wn ← Xn*cosα + Yn*sinα
            vn ← Yn*cosα - Xn*sinα
            "Global End Node Displacements "
            Xk ← z[uk, 1]
            Yk ← z[uk, 2]
            "Local End Node Displacements "
            wk ← Xk*cosα + Yk*sinα
            vk ← Yk*cosα - Xk*sinα
            1
            for i ∈ 0 .. n
                x[i + 1] ← Ldef/n*i
                y[i + 1] ← (vn*N1(x[i + 1], Ldef) + vk*N2(x[i + 1], Ldef))
            x ← x + wn
            for i ∈ 0 .. n
                xy[(n + 1)*ne + i, 1] ← xn + x[i + 1]*cosα - y[i + 1]*sinα
                xy[(n + 1)*ne + i, 2] ← yn + x[i + 1]*sinα + y[i + 1]*cosα
        X_Y[NS] ← xy
    return X_Y
DefCrama(XY, ue, z, n, k) :=
    z ← z*k
    for ne ∈ 1 .. rows(ue)
        un ← ue[ne, 1]
        uk ← ue[ne, 2]
        xn ← XY[un, 1]
        yn ← XY[un, 2]
        xk ← XY[uk, 1]
        yk ← XY[uk, 2]
        L ← sqrt((xk - xn)^2 + (yk - yn)^2)
        Ldef ← sqrt(((xk + z[uk, 1]) - (xn + z[un, 1]))^2 + ((yk + z[uk, 2]) - (yn + z[un, 2]))^2)
        cosα ← (xk - xn)/L
        sinα ← (yk - yn)/L
        "Global Origin Node Displacements "
        Xn ← z[un, 1]
        Yn ← z[un, 2]
        φn ← z[un, 3]
        "Local Origin Node Displacements "
        wn ← Xn*cosα + Yn*sinα
        vn ← Yn*cosα - Xn*sinα
        "Global End Node Displacements "
        Xk ← z[uk, 1]
        Yk ← z[uk, 2]
        φk ← z[uk, 3]
        "Local End Node Displacements "
        wk ← Xk*cosα + Yk*sinα
        vk ← Yk*cosα - Xk*sinα
        for i ∈ 0 .. n
            x[i + 1] ← Ldef/n*i
            y[i + 1] ← (vn*N0r(x[i + 1], Ldef) + φn*N1r(x[i + 1], Ldef) + vk*N2r(x[i + 1], Ldef) + φk*N3r(x[i + 1], Ldef))
        x ← x + wn
        for i ∈ 0 .. n
            xy[(n + 1)*ne + i, 1] ← xn + x[i + 1]*cosα - y[i + 1]*sinα
            xy[(n + 1)*ne + i, 2] ← yn + x[i + 1]*sinα + y[i + 1]*cosα
    return xy
cke := 11111
# [area: МП нуль-элементы]
MI0_n := [7, 8, 9, 10, 29; 5, 6, 11, 12, 30; 13, 14, 17, 18, 31; 15, 16, 19, 20, 32]
MI0_t := [7, 8, 9, 10, 33; 5, 6, 11, 12, 34; 13, 14, 17, 18, 35; 15, 16, 19, 20, 36]
MI0_nt := stack(MI0_n, MI0_t)
# Формирование вектора глобальных перемещений на элементе
Form_U0(U, MI0, ne) :=
    for i ∈ 1 .. cols(MI0)
        U0[i] ← U[MI0[ne, i]]
    U0
# Формирование усилия на элементе ne при нагружении LoadNumber нуль элемента
Form_0element_N(cke, cosα, sinα, U, ne, LoadNumber, MI0) :=
    ke0Row ← transpose(transpose(Form_ke_0(cke))[:, 2])
    Λe0 ← Form_Λe_0(cosα, sinα)
    U0 ← Form_U0(U[:, LoadNumber], MI0, ne)
    return -(ke0Row*Λe0*U0)
# Опоры для верхнего и нижнего
α_null := [π/2; π/2; π/2; π/2]
# Опоры для верхнего и нижнего
Support0 := Support
# Формирование ГМЖ с нуль-элементами
Form_R_one(XY, UE, MI, MC, MI0_nt) :=
    f(x, y) ← 0
    R ← matrix(max(MI0_nt), max(MI0_nt), f)
    RF ← matrix(max(MI0_nt), 1, f)
    for ne ∈ 1 .. rows(UE)
        nMC ← MC[ne, 1]
        ET ← MC[ne, 2]
        E ← MehChar[nMC, 1]
        μ ← MehChar[nMC, 2]
        t ← MehChar[nMC, 3]
        ke ← Form_ke4general(E, μ, t, UE, XY, MC, ne)
        R ← Form_R(R, MI, ne, ke)
    for ne ∈ 1 .. rows(UErama)
        nMC ← MCr[ne, 1]
        [L; cosα; sinα] ← cs(XY, UErama, ne)
        EI ← MehCharRama[nMC, 1]*MehCharRama[nMC, 3]
        EA ← MehCharRama[nMC, 1]*MehCharRama[nMC, 2]
        Ke ← Form_Ke(EI, EA, L, cosα, sinα)
        R ← Form_R_rama(R, Ke, MIrama, ne)
    for ne ∈ 1 .. rows(MI0_nt)
        [cosα; sinα] ←
            [cos(α_null[ne]); sin(α_null[ne])] if ne ≤ rows(MI0_nt)/2
            [cos(α_null[ne - rows(MI0_nt)/2] - π/2); sin(α_null[ne - rows(MI0_nt)/2] - π/2)] otherwise
        ke0 ← Form_ke_0(cke)
        Ke0 ← Form_Ke_0(cosα, sinα, ke0)
        R ← Form_R(R, MI0_nt, ne, Ke0)
    R ← Supports_forR(R, Support0)
    return R
Rnt := Form_R_one(XY, UE, MI, MC, MI0_nt)
rank(Rnt) = 36
rows(MI0_n) = 4
rows(Rnt) = 36
rows(Rnt) - rank(Rnt) = 0
Rnt =  # no stored result
Support0 = [1, 0; 2, 0; 3, 0; 4, 0; 21, 0; 22, 0; 23, 0; 24, 0]
# Формирование узловых перемещений от единичного смещения нуль-элементов
Form_U_one(XY, UE, MI, MC, MI0_nt) :=
    R ← Form_R_one(XY, UE, MI, MC, MI0_nt)
    f(x, y) ← 0
    RF ← matrix(max(MI0_nt), rows(MI0_nt), f)
    for ne0 ∈ 1 .. rows(MI0_nt)
        [cosα; sinα] ←
            [0; 1] if ne0 ≤ rows(MI0_n)
            [1; 0] otherwise
        qe0 ← Form_qe_0(cke)
        Qe0 ← Form_Qe(qe0, cosα, sinα)
        RF[:, ne0] ← LoadQ_to_RF(Qe0, MI0_nt, RF[:, ne0], ne0)
    1
    U ← lsolve(R, RF)
Uone := Form_U_one(XY, UE, MI, MC, MI0_nt)
Uone = [
    0, 0, 0, 0, 0, 0, 0, 0;
    0, 0, 0, 0, 0, 0, 0, 0;
    0, 0, 0, 0, 0, 0, 0, 0;
    0, 0, 0, 0, 0, 0, 0, 0;
    -0.263388, 0.120478, -0.192469, 0.0495585, 0.274326, -0.768099, -0.264889, -0.228884;
    0.244155, -0.665016, -0.318493, -0.102368, -0.107745, 0.0658204, -0.0735509, 0.031626;
    -0.263371, 0.12054, -0.192414, 0.049583, -0.724807, 0.231159, -0.264816, -0.228831;
    -0.220829, 0.237956, -0.0910488, 0.108176, -0.258029, 0.0466871, -0.103595, -0.107747;
    -0.263371, 0.12054, -0.192414, 0.049583, 0.275193, 0.231159, -0.264816, -0.228831;
    0.779171, 0.237956, -0.0910488, 0.108176, -0.258029, 0.0466871, -0.103595, -0.107747
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]
# Формирование контактной матрицы жёсткости
Form_r_one(XY, UE, MI, MC, MI0_nt) :=
    Uone ← Form_U_one(XY, UE, MI, MC, MI0_nt)
    for LoadNumber ∈ 1 .. rows(MI0_nt)
        for ne ∈ 1 .. rows(MI0_nt)
            [cosα; sinα] ←
                [0; 1] if ne ≤ rows(MI0_n)
                [1; 0] otherwise
            r[ne, LoadNumber] ← Form_0element_N(cke, cosα, sinα, Uone, ne, LoadNumber, MI0_nt)
    r
# Нагружение грунда полезной нагрузкой. Формирование массива узловых перемещений
Form_Uf(XY, UE, MI, MC, LoadFQ, MI0_nt) :=
    R ← Form_R_one(XY, UE, MI, MC, MI0_nt)
    f(x, y) ← 0
    RF ← matrix(max(MI0_nt), 1, f)
    RF ← LoadF_to_RF(RF, LoadFQ)
    RF ← LoadFγ_to_RF(RF, UE, XY, MC, t, γ) if γ ≠ 0
    [R; RF] ← Supports(R, RF, Support0)
    U ← lsolve(R, RF)
    return U
# Формирование вектора реакций ГВ для ЛЗД
Form_Rf(XY, UE, MI, MC, LoadFQ, MI0_nt) :=
    Uf ← Form_Uf(XY, UE, MI, MC, LoadFQ, MI0_nt)
    for ne ∈ 1 .. rows(MI0_nt)
        [cosα; sinα] ←
            [0; 1] if ne ≤ rows(MI0_n)
            [1; 0] otherwise
        Λf[ne] ← Form_0element_N(cke, cosα, sinα, Uf, ne, 1, MI0_nt)
    Λf
# Матрица индексов по узлам
Form_MInu(XY) :=
    f(x, y) ← 0
    MInu ← matrix(rows(XY), 2, f)
    for nu ∈ 1 .. rows(XY)
        MInu[nu, 1] ← 2*nu - 1
        MInu[nu, 2] ← 2*nu
    MInu
MInu := Form_MInu(XY)
# Нагрузка на n номер нуль элемента n := 1
Uf := Form_Uf(XY, UE, MI, MC, LoadFQ, MI0_nt)
OneU := Uone[:, n]
z(XYgeneral) :=
    f(x, y) ← 0
    z ← matrix(rows(XYgeneral), 2, f)
    for nu ∈ 1 .. rows(XYgeneral)
        for i ∈ 1 .. 2
            z[:, i][nu] ← Uf[stack(MInu)[:, i][nu]]
    z
zZ(XYgeneral) :=
    XYMI ← stack(XYgeneral, [0, 0])
    f(x, y) ← 0
    z ← matrix(rows(XYMI), 2, f)
    for nu ∈ 1 .. rows(XYMI) - 1
        for i ∈ 1 .. 2
            z[:, i][nu] ← OneU[stack(MInu)[:, i][nu]]
    z
# Контактная матрица жёсткости
# Данные для ЛЗД по касательной + нормали
r_nτ := Form_r_one(XY, UE, MI, MC, MI0_nt)
Rf_nτ := Form_Rf(XY, UE, MI, MC, LoadFQ, MI0_nt)
# Деформированная схема (грузовой вектор)
r_nτ = [
    2256884, -2897570, 1276019, -1916704, 392771, 201207, 217131, 376846;
    -2897570, 14630492, 9975584, 1757338, 1421376, 4943576, 4650130, 1714822;
    1276019, 9975584, 14440922, -3189319, 1255112, 4632645, 4351259, 1536497;
    -1916704, 1757338, -3189319, 3029953, 559034, 512138, 516002, 555171;
    392771, 1421376, 1255112, 559034, 19836233, -16949724, 1670760, 1215750;
    201207, 4943576, 4632645, 512138, -16949724, 21928631, 3133669, 1845238;
    217131, 4650130, 4351259, 516002, 1670760, 3133669, 19157294, -14352865;
    376846, 1714822, 1536497, 555171, 1215750, 1845238, -14352865, 17413853
]
МасштабZ := 0.4
Масштаб := 6
КолВо := 50
xyzZ := DefC(XY, UE, zZ, 4, КолВо, МасштабZ)[1]
max(r_nτ - transpose(r_nτ)) = 3.68757e-6
max(r_n - transpose(r_n)) =  # error: Эта переменная не определена.
xyz := DefC(XY, UE, z, 4, КолВо, Масштаб)[1]
xyz1Z := DefC(XY, UE, zZ, 4, КолВо, МасштабZ)[2]
min(r_nτ - transpose(r_nτ)) = -3.68757e-6
min(r_n - transpose(r_n)) =  # error
xyz2Z := DefC(XY, UE, zZ, 4, КолВо, МасштабZ)[3]
xyz1 := DefC(XY, UE, z, 4, КолВо, Масштаб)[2]
xyz2 := DefC(XY, UE, z, 4, КолВо, Масштаб)[3]  # последние числа:  число точек на элементе и масштаб перемещений
# Грузовой вектор
# Перемещения от LoadFQ
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Rf_nτ = [56556.8; -186894; 133003; -263341; -177200; -216589; 286400; 319810]
OneU = [
    0; 0; 0; 0; -0.263388; 0.244155; -0.263371; -0.220829; -0.263371; 0.779171
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]
Uf = [
    0; 0; 0; 0; 0.0265613; -0.00370952; 0.0265535; 0.0084512; 0.0265535; 0.0084512
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]
Rnt =  # no stored result
ne ← 1
nMC ← MCr[ne, 1]
[L; cosα; sinα] ← cs(XY, UErama, ne)
EI ← MehCharRama[nMC, 1]*MehCharRama[nMC, 3]
EA ← MehCharRama[nMC, 1]*MehCharRama[nMC, 2]
ke ← Form_ke(EI, EA, L)
λe ← Form_λe(cosα, sinα)
Ke ← Form_Ke(EI, EA, L, cosα, sinα)
return ke
R ← Form_R_rama(R, Ke, MIrama, ne)
= [
    2.28571e10, 0, 0, -2.28571e10, 0, 0;
    0, 102997085, 90122449, 0, -102997085, 90122449;
    0, 90122449, 105142857, 0, -90122449, 52571429;
    -2.28571e10, 0, 0, 2.28571e10, 0, 0;
    0, -102997085, -90122449, 0, 102997085, -90122449;
    0, 90122449, 52571429, 0, -90122449, 105142857
]
[
    2.286*10^10, 0, 0, -2.286*10^10, 0, 0;
    0, 1.03*10^8, 9.012*10^7, 0, -1.03*10^8, 9.012*10^7;
    0, 9.012*10^7, 1.051*10^8, 0, -9.012*10^7, 5.257*10^7;
    -2.286*10^10, 0, 0, 2.286*10^10, 0, 0;
    0, -1.03*10^8, -9.012*10^7, 0, 1.03*10^8, -9.012*10^7;
    0, 9.012*10^7, 5.257*10^7, 0, -9.012*10^7, 1.051*10^8
]
Ar = 0.2
Er = 200000000000
Ix = 0.00023
